Read := READBIN("./ExcField.dat", "int32")
Nx := Read[0] = 144
Ny := Read[1] = 360
Read := READBIN("./ExcField.dat", "float", 0, Nx*16, 8, Ny)
i := 0 .. Nx - 1
j := 0 .. Ny - 1
Ex_mag[i, j] := Read[j, i*16 + 0]
Ex_rad[i, j] := Read[j, i*16 + 1]
Ex_cos[i, j] := Read[j, i*16 + 2]
Ex_sin[i, j] := Read[j, i*16 + 3]
# [component: inputs Ex_mag]
# [component: inputs Ex_rad]
# [component: inputs Ex_cos]
# [component: inputs Ex_sin]
Ey_mag[i, j] := Read[j, i*16 + 4]
Ey_rad[i, j] := Read[j, i*16 + 5]
Ey_cos[i, j] := Read[j, i*16 + 6]
Ey_sin[i, j] := Read[j, i*16 + 7]
# [component: inputs Ey_mag]
# [component: inputs Ey_rad]
# [component: inputs Ey_cos]
# [component: inputs Ey_sin]
Ex_mag[i, j] := Read[j, i*16 + 0]
Ex_rad[i, j] := Read[j, i*16 + 1]
Ex_cos[i, j] := Read[j, i*16 + 2]
Ex_sin[i, j] := Read[j, i*16 + 3]
# [component: inputs Ex_mag]
# [component: inputs Ex_rad]
# [component: inputs Ex_cos]
# [component: inputs Ex_sin]
Ey_mag[i, j] := Read[j, i*16 + 4]
Ey_rad[i, j] := Read[j, i*16 + 5]
Ey_cos[i, j] := Read[j, i*16 + 6]
Ey_sin[i, j] := Read[j, i*16 + 7]
# [component: inputs Ey_mag]
# [component: inputs Ey_rad]
# [component: inputs Ey_cos]
# [component: inputs Ey_sin]
