Read := READBIN("./CheckmodelI.dat", "int32")
Nx := Read[0] = 100
Ny := Read[1] = 100
Nz := Read[2] = 342
Read := READBIN("./CheckmodelI.dat", "int32")
ii := 40
jj := 40
kk := FRAME
i := 0 .. Nx - 1
j := 0 .. Ny - 1
k := 0 .. Nz - 1
CutXOY[i, j] := Read[3 + kk*Nx*Ny + j*Nx + i]
CutXOZ[i, k] := Read[3 + k*Nx*Ny + jj*Nx + i]
CutYOZ[j, k] := Read[3 + k*Nx*Ny + j*Nx + ii]
# [component: inputs CutXOY]
# [component: inputs CutXOZ]
# [component: inputs CutYOZ]
