Read := READBIN("./WaveguideField.dat", "int32")
N := Read[0] = 100
Read := READBIN("./WaveguideField.dat", "double", 0, N*2*4, 4, N)
i := 0 .. N - 1
j := 0 .. N - 1
Ex[i, j] := Read[j, i*8 + 0] + 1i*Read[j, i*8 + 1]
Ey[i, j] := Read[j, i*8 + 2] + 1i*Read[j, i*8 + 3]
Hx[i, j] := Read[j, i*8 + 4] + 1i*Read[j, i*8 + 5]
Hy[i, j] := Read[j, i*8 + 6] + 1i*Read[j, i*8 + 7]
# [component: inputs Ex]
# [component: inputs Hy]
# [component: inputs Ey]
# [component: inputs Hx]
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