Read := READPRN("./sizeXOZ.txt")
Nx := Read[:, 0][0]
Nz := Read[:, 1][0]
Nx = 136
Nz = 677
Read := READPRN("./XOZ.txt")
i := 0 .. Nx - 1
k := 0 .. Nz - 1
ExXOZ[i, k] := Read[i + k*Nx, 2]
EyXOZ[i, k] := Read[i + k*Nx, 3]
EzXOZ[i, k] := Read[i + k*Nx, 4]
EpsMapXOZ[i, k] := Read[i + k*Nx, 5]
AEyXOZ[i, k] := |EyXOZ[i, k]|
# [component: inputs ExXOZ, EpsMapXOZ]
# [component: inputs EzXOZ, EpsMapXOZ]
# [component: inputs EyXOZ]
# [component: inputs AEyXOZ, EpsMapXOZ]
Read := READPRN("./sizeXOY.txt")
Nx := Read[:, 0][0]
Ny := Read[:, 1][0]
Read := READPRN("./XOY.txt")
i := 0 .. Nx - 1
j := 0 .. Ny - 1
ExXOY[i, j] := Read[i + j*Nx, 2]
EyXOY[i, j] := Read[i + j*Nx, 3]
EzXOY[i, j] := Read[i + j*Nx, 4]
EpsMapXOY[i, j] := Read[i + j*Nx, 5]
# [component: inputs EyXOY, EpsMapXOY]
# [component: inputs EzXOY, EpsMapXOY]
# [component: inputs ExXOY, EpsMapXOY]
