Nphi := 240
Nz := 240
ip := 0 .. Nphi - 1
iz := 0 .. Nz - 1
Read := READPRN("./RadiatedFields_E.txt")
Ep[ip, iz] := Read[:, 2][ip + iz*Nphi] + 1i*Read[:, 3][ip + iz*Nphi]
AEp[ip, iz] := |Ep[ip, iz]|
Phi[ip, iz] := Read[:, 0][ip + iz*Nphi]*180/π
Ez[ip, iz] := Read[:, 4][ip + iz*Nphi] + 1i*Read[:, 5][ip + iz*Nphi]
AEz[ip, iz] := |Ez[ip, iz]|
Z[ip, iz] := Read[:, 1][ip + iz*Nphi]
# [component: inputs AEp]
# [component: inputs Ep]
Read := READPRN("./RadiatedFields_H.txt")
Ep[ip, iz] := Read[:, 2][ip + iz*Nphi] + 1i*Read[:, 3][ip + iz*Nphi]
AEp[ip, iz] := |Ep[ip, iz]|
Phi[ip, iz] := Read[:, 0][ip + iz*Nphi]*180/π
Ez[ip, iz] := Read[:, 4][ip + iz*Nphi] + 1i*Read[:, 5][ip + iz*Nphi]
AEz[ip, iz] := |Ez[ip, iz]|
Z[ip, iz] := Read[:, 1][ip + iz*Nphi]
# [component: inputs AEz]
# [component: inputs Ez]
