J1n(n, x) := d/dx(Jn(n, x))
f(x) := J1n(22, x)
Proot := root(f(x), x, 45, 47) = 45.6243
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# TE 波 TE62模
n := 22
# 贝塞尔22阶第6个根
f := 140*10^9
c := 2.998*10^8
λ := c/f = 0.00214143
m := 6
a := 20*10^-3  # 半径20毫米
vni := Proot
# 贝塞尔22阶
# 第6个根
k := 2*π/λ
ϕ0 := 0*π/2  # 极化
ω := 2*π*f
kr := vni/a
λc := 2*π/kr = 0.00275431
μ0 := 4*π*10^-7
β := 2*π*f/c*sqrt(1 - (λ/λc)^2)
kz := sqrt(k^2 - kr^2)
λg := λ/sqrt(1 - (λ/λc)^2) = 0.00340501
Eϕ(r, ϕ) := ω*μ0*kr*J1n(n, kr*r)*cos(n*ϕ - ϕ0)
Er(r, ϕ) := ω*μ0*(n/r)*Jn(n, kr*r)*sin(n*ϕ - ϕ0)
Hϕ(r, ϕ) := kz*(n/r)*Jn(n, kr*r)*sin(n*ϕ - ϕ0)
Hr(r, ϕ) := -kz*kr*J1n(n, kr*r)*cos(n*ϕ - ϕ0)
Hz(r, ϕ) := -1j*kr^2*Jn(n, kr*r)*cos(n*ϕ - ϕ0)
# FDTD 仿真参数
ds := 0.1*10^-3
radius_r := 23*10^-3
N := (radius_r/ds + 10)*2 = 480
a := 20*10^-3
i := 0 .. N + 1
j := 0 .. N + 1
X[i] := (i - 0.5)*ds - (radius_r + 10*ds)
Y[j] := (j - 0.5)*ds - (radius_r + 10*ds)
EP[i, j] := Eϕ(sqrt(X[i]^2 + Y[j]^2), angle(X[i], Y[j]))
ER[i, j] := Er(sqrt(X[i]^2 + Y[j]^2), angle(X[i], Y[j]))
EP[i, j] := if(sqrt(X[i]^2 + Y[j]^2) < a, EP[i, j], 0)
# Ex  Hy
Xx[i] := X[i]
Yy[j] := Y[j] - ds*0.5
Φ[i, j] := if(Yy[j] == 0 and Xx[i] == 0, 0, angle(Xx[i], Yy[j]))
R[i, j] := sqrt(Xx[i]^2 + Yy[j]^2)
Ex[i, j] := cos(Φ[i, j])*Er(R[i, j], Φ[i, j]) - sin(Φ[i, j])*Eϕ(R[i, j], Φ[i, j])
Hy[i, j] := sin(Φ[i, j])*Hr(R[i, j], Φ[i, j]) + cos(Φ[i, j])*Hϕ(R[i, j], Φ[i, j])
Ex[i, j] := if(R[i, j] < a, Ex[i, j], 0)
Hy[i, j] := if(R[i, j] < a, Hy[i, j], 0)
# Ex  Hy
Xx[i] := X[i] - ds*0.5
Yy[j] := Y[j]
Φ[i, j] := if(Yy[j] == 0 and Xx[i] == 0, 0, angle(Xx[i], Yy[j]))
R[i, j] := sqrt(Xx[i]^2 + Yy[j]^2)
Ey[i, j] := sin(Φ[i, j])*Er(R[i, j], Φ[i, j]) + cos(Φ[i, j])*Eϕ(R[i, j], Φ[i, j])
Hx[i, j] := cos(Φ[i, j])*Hr(R[i, j], Φ[i, j]) - sin(Φ[i, j])*Hϕ(R[i, j], Φ[i, j])
Ey[i, j] := if(R[i, j] < a, Ey[i, j], 0)
Hx[i, j] := if(R[i, j] < a, Hx[i, j], 0)
# [component: inputs EP]
# [component: inputs Hy]
# [component: inputs ER]
# [component: inputs Hx]
WR[i + j*(N + 2), 0] := i
WR[i + j*(N + 2), 1] := j
WR[i + j*(N + 2), 2] := |Ex[i, j]|
WR[i + j*(N + 2), 3] := arg(Ex[i, j] + 10^-10)
WR[i + j*(N + 2), 4] := |Ey[i, j]|
WR[i + j*(N + 2), 5] := arg(Ey[i, j] + 10^-10)
A := WRITEPRN("./SourcePlaneInjection.txt", WR)
WR =  # no stored result
