# 读取并检查 惠更斯面的分布
# 读取空间尺寸  采样点数
Read := READBIN("./HuygensBoxData.dat", "int32", 0, 1, 0, 3)
Nx := Read[0] = 109
Ny := Read[1] = 288
Nz := Read[2] = 716
# 读取空间尺寸  离散间隔
Read := READBIN("./HuygensBoxData.dat", "float", 0, 1, 3*4, 3)
dx := Read[0] = 0.0004
dy := Read[1] = 0.0004
dz := Read[2] = 0.0004
# 读取频率采样点数
Read := READBIN("./HuygensBoxData.dat", "int32", 0, 1, 6*4, 1)
Nfreq := Read[0] = 1
Nf := 1
# 读取DFT 频率
Read := READBIN("./HuygensBoxData.dat", "float", 0, 1, (6 + 1)*4, 1)
freq := Read[0] = 44000002048
# 读取场分布
i := 0 .. Nx - 1
j := 0 .. Ny - 1
k := 0 .. Nz - 1
# XOY
Read := READBIN("./HuygensBoxData.dat", "float", 0, 1, (7 + Nf)*4, Nx*Ny*4*2)
Ex_xoy1[i, j] := Read[(i + j*Nx)*2] + 1i*Read[(i + j*Nx)*2 + 1]
Ey_xoy1[i, j] := Read[(i + j*Nx)*2 + Nx*Ny*2*1] + 1i*Read[(i + j*Nx)*2 + 1 + Nx*Ny*2*1]
AEx_xoy1[i, j] := |Ex_xoy1[i, j]|
AEy_xoy1[i, j] := |Ey_xoy1[i, j]|
Hx_xoy1[i, j] := Read[(i + j*Nx)*2 + Nx*Ny*2*2] + 1i*Read[(i + j*Nx)*2 + 1 + Nx*Ny*2*2]
Hy_xoy1[i, j] := Read[(i + j*Nx)*2 + Nx*Ny*2*3] + 1i*Read[(i + j*Nx)*2 + 1 + Nx*Ny*2*3]
AHx_xoy1[i, j] := |Hx_xoy1[i, j]|
AHy_xoy1[i, j] := |Hy_xoy1[i, j]|
# [component: inputs AEx_xoy1]
# [component: inputs AEy_xoy1]
# [component: inputs AHx_xoy1]
# [component: inputs AHy_xoy1]
# 输出到FEKO文件
M_xoy_1[i + j*Nx, 0] := |Ex_xoy1[i, j]|
M_xoy_1[i + j*Nx, 1] := arg(Ex_xoy1[i, j])*180/π
M_xoy_1[i + j*Nx, 2] := |Ey_xoy1[i, j]|
M_xoy_1[i + j*Nx, 3] := arg(Ey_xoy1[i, j])*180/π
a := WRITEPRN("./HuygensForFEKO/E_xoy1.txt", M_xoy_1)
M_xoy_1[i + j*Nx, 0] := |Hx_xoy1[i, j]|
M_xoy_1[i + j*Nx, 1] := arg(Hx_xoy1[i, j])*180/π
M_xoy_1[i + j*Nx, 2] := |Hy_xoy1[i, j]|
M_xoy_1[i + j*Nx, 3] := arg(Hy_xoy1[i, j])*180/π
a := WRITEPRN("./HuygensForFEKO/H_xoy1.txt", M_xoy_1)
# XOZ0-XOZ1
Read := READBIN("./HuygensBoxData.dat", "float", 0, 1, (7 + Nf)*4 + Nx*Ny*4*2*4, Nx*Nz*4*2)
Ex_xoz0[i, k] := Read[(i + k*Nx)*2] + 1i*Read[(i + k*Nx)*2 + 1]
Ez_xoz0[i, k] := Read[(i + k*Nx)*2 + Nx*Nz*2*1] + 1i*Read[(i + k*Nx)*2 + 1 + Nx*Nz*2*1]
AEx_xoz0[i, k] := |Ex_xoz0[i, k]|
AEz_xoz0[i, k] := |Ez_xoz0[i, k]|
Hx_xoz0[i, k] := Read[(i + k*Nx)*2 + Nx*Nz*2*2] + 1i*Read[(i + k*Nx)*2 + 1 + Nx*Nz*2*2]
Hz_xoz0[i, k] := Read[(i + k*Nx)*2 + Nx*Nz*2*3] + 1i*Read[(i + k*Nx)*2 + 1 + Nx*Nz*2*3]
AHx_xoz0[i, k] := |Hx_xoz0[i, k]|
AHz_xoz0[i, k] := |Hz_xoz0[i, k]|
Read := READBIN("./HuygensBoxData.dat", "float", 0, 1, (7 + Nf)*4 + Nx*Ny*4*2*4 + Nx*Nz*4*2*4, Nx*Nz*4*2)
Ex_xoz1[i, k] := Read[(i + k*Nx)*2] + 1i*Read[(i + k*Nx)*2 + 1]
Ez_xoz1[i, k] := Read[(i + k*Nx)*2 + Nx*Nz*2*1] + 1i*Read[(i + k*Nx)*2 + 1 + Nx*Nz*2*1]
AEx_xoz1[i, k] := |Ex_xoz1[i, k]|
AEz_xoz1[i, k] := |Ez_xoz1[i, k]|
Hx_xoz1[i, k] := Read[(i + k*Nx)*2 + Nx*Nz*2*2] + 1i*Read[(i + k*Nx)*2 + 1 + Nx*Nz*2*2]
Hz_xoz1[i, k] := Read[(i + k*Nx)*2 + Nx*Nz*2*3] + 1i*Read[(i + k*Nx)*2 + 1 + Nx*Nz*2*3]
AHx_xoz1[i, k] := |Hx_xoz1[i, k]|
AHz_xoz1[i, k] := |Hz_xoz1[i, k]|
# [component: inputs AEx_xoz0]
# [component: inputs AEx_xoz1]
# [component: inputs AEz_xoz0]
# [component: inputs AEz_xoz1]
# [component: inputs AHx_xoz0]
# [component: inputs AHx_xoz1]
# [component: inputs AHz_xoz0]
# [component: inputs AHz_xoz1]
# XOZ0
# 输出到FEKO文件
M_xoz_0[i + k*Nx, 0] := |Ex_xoz0[i, k]|
M_xoz_0[i + k*Nx, 1] := arg(Ex_xoz0[i, k])*180/π
M_xoz_0[i + k*Nx, 2] := |Ez_xoz0[i, k]|
M_xoz_0[i + k*Nx, 3] := arg(Ez_xoz0[i, k])*180/π
a := WRITEPRN("./HuygensForFEKO/E_xoz0.txt", M_xoz_0)
M_xoz_0[i + k*Nx, 0] := |Hx_xoz0[i, k]|
M_xoz_0[i + k*Nx, 1] := arg(Hx_xoz0[i, k])*180/π
M_xoz_0[i + k*Nx, 2] := |Hz_xoz0[i, k]|
M_xoz_0[i + k*Nx, 3] := arg(Hz_xoz0[i, k])*180/π
a := WRITEPRN("./HuygensForFEKO/H_xoz0.txt", M_xoz_0)
# 输出到FEKO文件 | XOZ1
M_xoz_1[i + k*Nx, 0] := |Ex_xoz1[i, k]|
M_xoz_1[i + k*Nx, 1] := arg(Ex_xoz1[i, k])*180/π
M_xoz_1[i + k*Nx, 2] := |Ez_xoz1[i, k]|
M_xoz_1[i + k*Nx, 3] := arg(Ez_xoz1[i, k])*180/π
a := WRITEPRN("./HuygensForFEKO/E_xoz1.txt", M_xoz_1)
M_xoz_1[i + k*Nx, 0] := |Hx_xoz1[i, k]|
M_xoz_1[i + k*Nx, 1] := arg(Hx_xoz1[i, k])*180/π
M_xoz_1[i + k*Nx, 2] := |Hz_xoz1[i, k]|
M_xoz_1[i + k*Nx, 3] := arg(Hz_xoz1[i, k])*180/π
a := WRITEPRN("./HuygensForFEKO/H_xoz1.txt", M_xoz_1)
# YOZ0-YOZ1
Read := READBIN("./HuygensBoxData.dat", "float", 0, 1, (7 + Nf)*4 + Nx*Ny*4*2*4 + Nx*Nz*4*2*4*2, Ny*Nz*4*2)
Ey_yoz0[j, k] := Read[(j + k*Ny)*2] + 1i*Read[(j + k*Ny)*2 + 1]
Ez_yoz0[j, k] := Read[(j + k*Ny)*2 + Ny*Nz*2*1] + 1i*Read[(j + k*Ny)*2 + 1 + Ny*Nz*2*1]
AEy_yoz0[j, k] := |Ey_yoz0[j, k]|
AEz_yoz0[j, k] := |Ez_yoz0[j, k]|
Hy_yoz0[j, k] := Read[(j + k*Ny)*2 + Ny*Nz*2*2] + 1i*Read[(j + k*Ny)*2 + 1 + Ny*Nz*2*2]
Hz_yoz0[j, k] := Read[(j + k*Ny)*2 + Ny*Nz*2*3] + 1i*Read[(j + k*Ny)*2 + 1 + Ny*Nz*2*3]
AHy_yoz0[j, k] := |Hy_yoz0[j, k]|
AHz_yoz0[j, k] := |Hz_yoz0[j, k]|
Read := READBIN("./HuygensBoxData.dat", "float", 0, 1, (7 + Nf)*4 + Nx*Ny*4*2*4 + Nx*Nz*4*2*4*2 + Ny*Nz*4*2*4, Ny*Nz*4*2)
Ey_yoz1[j, k] := Read[(j + k*Ny)*2] + 1i*Read[(j + k*Ny)*2 + 1]
Ez_yoz1[j, k] := Read[(j + k*Ny)*2 + Ny*Nz*2*1] + 1i*Read[(j + k*Ny)*2 + 1 + Ny*Nz*2*1]
AEy_yoz1[j, k] := |Ey_yoz1[j, k]|
AEz_yoz1[j, k] := |Ez_yoz1[j, k]|
Hy_yoz1[j, k] := Read[(j + k*Ny)*2 + Ny*Nz*2*2] + 1i*Read[(j + k*Ny)*2 + 1 + Ny*Nz*2*2]
Hz_yoz1[j, k] := Read[(j + k*Ny)*2 + Ny*Nz*2*3] + 1i*Read[(j + k*Ny)*2 + 1 + Ny*Nz*2*3]
AHy_yoz1[j, k] := |Hy_yoz1[j, k]|
AHz_yoz1[j, k] := |Hz_yoz1[j, k]|
# [component: inputs AEy_yoz0]
# [component: inputs AEy_yoz1]
# [component: inputs AEz_yoz0]
# [component: inputs AEz_yoz1]
# [component: inputs AHy_yoz0]
# [component: inputs AHy_yoz1]
# [component: inputs AHz_yoz0]
# [component: inputs AHz_yoz1]
# YOZ0
# 输出到FEKO文件
M_yoz_0[j + k*Ny, 0] := |Ey_yoz0[j, k]|
M_yoz_0[j + k*Ny, 1] := arg(Ey_yoz0[j, k])*180/π
M_yoz_0[j + k*Ny, 2] := |Ez_yoz0[j, k]|
M_yoz_0[j + k*Ny, 3] := arg(Ez_yoz0[j, k])*180/π
a := WRITEPRN("./HuygensForFEKO/E_yoz0.txt", M_yoz_0)
M_yoz_0[j + k*Ny, 0] := |Hy_yoz0[j, k]|
M_yoz_0[j + k*Ny, 1] := arg(Hy_yoz0[j, k])*180/π
M_yoz_0[j + k*Ny, 2] := |Hz_yoz0[j, k]|
M_yoz_0[j + k*Ny, 3] := arg(Hz_yoz0[j, k])*180/π
a := WRITEPRN("./HuygensForFEKO/H_yoz0.txt", M_yoz_0)
# YOZ1
# 输出到FEKO文件
M_yoz_1[j + k*Ny, 0] := |Ey_yoz1[j, k]|
M_yoz_1[j + k*Ny, 1] := arg(Ey_yoz1[j, k])*180/π
M_yoz_1[j + k*Ny, 2] := |Ez_yoz1[j, k]|
M_yoz_1[j + k*Ny, 3] := arg(Ez_yoz1[j, k])*180/π
a := WRITEPRN("./HuygensForFEKO/E_yoz1.txt", M_yoz_1)
M_yoz_1[j + k*Ny, 0] := |Hy_yoz1[j, k]|
M_yoz_1[j + k*Ny, 1] := arg(Hy_yoz1[j, k])*180/π
M_yoz_1[j + k*Ny, 2] := |Hz_yoz1[j, k]|
M_yoz_1[j + k*Ny, 3] := arg(Hz_yoz1[j, k])*180/π
a := WRITEPRN("./HuygensForFEKO/H_yoz1.txt", M_yoz_1)
